// SBML level 2 version 3

model model()

  // Species:
  species RNApoly in cell = 100/cell;
  species pA in cell = 1/cell;
  species mpA in cell = 0;
  species pB in cell = 1/cell;
  species pB_A in cell = 0;
  species mpB in cell = 0;
  species pC in cell = 1/cell;
  species pC_A in cell = 0;
  species pC_A_B in cell = 0;
  species pC_B in cell = 0;
  species mpC in cell = 0;
  species A in cell = 0;
  species B in cell = 0;
  species C in cell = 0;

  // Parameters:
  tr = 0.005776227;
  translation_pB = burst*tr;
  translation_pC = burst*tr;
  burst = 20;
  transcription_pC3 = 0;
  degradation_C = 0.0001925409;
  transcription_pC2 = 0;
  degradation_B = 0.0001925409;
  transcription_pC1 = 0.01;
  degradation_A = 0.0001925409;
  transcription_pC0 = 0;
  transcription_pA0 = 0.01;
  transcription_pB0 = 0;
  translation_pA = burst*tr;
  transcription_pB1 = 0.01;
  degradation_mpA = 0.005776227;
  degradation_mpB = 0.005776227;
  degradation_mpC = 0.005776227;

  // Reactions:
  pAmpA: pA -> pA + mpA; transcription_pA0*pA; pAmpA is "Transcription from pA of mpA";
  degmpA: mpA -> ; degradation_mpA*mpA; degmpA is "Degeneration of mpA";
  mpAA: mpA -> A + mpA; translation_pA*mpA; mpAA is "Translation of mpA to A";
  pBApB_A: pB + A -> pB_A; 7.5e-4*pB*A; pBApB_A is "Transcription factor A binds to pB to pB_A";
  rel_pBApB_A: pB_A -> pB + A; 0.39*pB_A; rel_pBApB_A is "Transcription factor A is released from pB_A to pB";
  pBmpB: pB -> pB + mpB; transcription_pB0*pB; pBmpB is "Transcription from pB of mpB";
  pB_AmpB: pB_A -> pB_A + mpB; transcription_pB1*pB_A; pB_AmpB is "Transcription from pB_A of mpB";
  degmpB: mpB -> ; degradation_mpB*mpB; degmpB is "Degeneration of mpB";
  mpBB: mpB -> B + mpB; translation_pB*mpB; mpBB is "Translation of mpB to B";
  pCApC_A: pC + A -> pC_A; 0.075*pC*A; pCApC_A is "Transcription factor A binds to pC to pC_A";
  rel_pCApC_A: pC_A -> pC + A; 0.39*pC_A; rel_pCApC_A is "Transcription factor A is released from pC_A to pC";
  pC_BApC_A_B: pC_B + A -> pC_A_B; 0.075*pC_B*A; pC_BApC_A_B is "Transcription factor A binds to pC_B to pC_A_B";
  rel_pC_BApC_A_B: pC_A_B -> pC_B + A; 0.39*pC_A_B; rel_pC_BApC_A_B is "Transcription factor A is released from pC_A_B to pC_B";
  pC_ABpC_A_B: pC_A + B -> pC_A_B; 0.075*pC_A*B; pC_ABpC_A_B is "Transcription factor B binds to pC_A to pC_A_B";
  rel_pC_ABpC_A_B: pC_A_B -> pC_A + B; 0.39*pC_A_B; rel_pC_ABpC_A_B is "Transcription factor B is released from pC_A_B to pC_A";
  pCBpC_B: pC + B -> pC_B; 0.075*pC*B; pCBpC_B is "Transcription factor B binds to pC to pC_B";
  rel_pCBpC_B: pC_B -> pC + B; 0.39*pC_B; rel_pCBpC_B is "Transcription factor B is released from pC_B to pC";
  pCmpC: pC -> pC + mpC; transcription_pC0*pC; pCmpC is "Transcription from pC of mpC";
  pC_AmpC: pC_A -> pC_A + mpC; transcription_pC1*pC_A; pC_AmpC is "Transcription from pC_A of mpC";
  pC_A_BmpC: pC_A_B -> pC_A_B + mpC; transcription_pC2*pC_A_B; pC_A_BmpC is "Transcription from pC_A_B of mpC";
  pC_BmpC: pC_B -> pC_B + mpC; transcription_pC3*pC_B; pC_BmpC is "Transcription from pC_B of mpC";
  degmpC: mpC -> ; degradation_mpC*mpC; degmpC is "Degeneration of mpC";
  mpCC: mpC -> C + mpC; translation_pC*mpC; mpCC is "Translation of mpC to C";
  degA: A -> ; degradation_A*A; degA is "Degeneration of A";
  degB: B -> ; degradation_B*B; degB is "Degeneration of B";
  degC: C -> ; degradation_C*C; degC is "Degeneration of C";
end
