// SBML level 2 version 3

model model()

  // Species:
  species RNApoly in cell = 100/cell;
  species oG in cell = 1/cell;
  species moG in cell = 0;
  species G in cell = 0;

  // Parameters:
  degradation_G = 0.0001925409;
  translation_oG = 0.1155245;
  degradation_moG = 0.005776227;
  transcription_oG0 = 0.01;

  // Reactions:
  oGmoG: oG -> oG + moG; transcription_oG0*oG; oGmoG is "Transcription from oG of moG";
  degmoG: moG -> ; degradation_moG*moG; degmoG is "Degeneration of moG";
  moGG: moG -> G + moG; translation_oG*moG; moGG is "Translation of moG to G";
  degG: G -> ; degradation_G*G; degG is "Degeneration of G";
end
