// SBML level 2 version 3

model zak()

  // Compartments:
  compartment Cell = 1;

  // Species:
  substanceOnly species A in Cell = 904.8395;
  substanceOnly species B in Cell = 0.5641;
  substanceOnly species C in Cell = 166.9104;
  substanceOnly species D in Cell = 0.1756;
  substanceOnly species E in Cell = 199.8356;
  substanceOnly species F in Cell = 0.02;
  substanceOnly species G in Cell = 0.1545;
  substanceOnly species H in Cell = 99.9363;
  substanceOnly species J in Cell = 0.0837;
  substanceOnly species K in Cell = 0.1545;
  substanceOnly species MA in Cell = 95.2973;
  substanceOnly species MB in Cell = 9.0081;
  substanceOnly species MC in Cell = 38.4593;
  substanceOnly species MD in Cell = 0.0351;
  substanceOnly species ME in Cell = 39.9671;
  substanceOnly species MF in Cell = 0.004;
  substanceOnly species MG in Cell = 0.0309;
  substanceOnly species MH in Cell = 19.9873;
  substanceOnly species MJ in Cell = 0.0167;
  substanceOnly species MK in Cell = 0.0309;
  substanceOnly species PAA in Cell = 0.1047;
  substanceOnly species PBA in Cell = 0.199;
  substanceOnly species PBF in Cell = 2;
  substanceOnly species PCA in Cell = 0.1531;
  substanceOnly species PCD in Cell = 1.9984;
  substanceOnly species PDC in Cell = 0.0027;
  substanceOnly species PDF in Cell = 2;
  substanceOnly species PED in Cell = 1.9984;
  substanceOnly species PFEQ in Cell = 2;
  substanceOnly species PGC in Cell = 0.0027;
  substanceOnly species PHG in Cell = 1.9987;
  substanceOnly species PJK in Cell = 1.9987;
  substanceOnly species PKC in Cell = 0.0027;
  substanceOnly species CC in Cell = 55705;
  substanceOnly species DD in Cell = 0.0617;
  substanceOnly species FF in Cell = 0.0008;
  substanceOnly species GG in Cell = 0.0478;
  substanceOnly species KK in Cell = 0.0478;
  substanceOnly species EQ in Cell = 0;
  substanceOnly species AB in Cell = 1003;
  substanceOnly species Q in Cell = 0;
  substanceOnly species A_PAA in Cell = 1.8953;
  substanceOnly species A_PBA in Cell = 1.801;
  substanceOnly species A_PCA in Cell = 1.8469;
  substanceOnly species CC_PDC in Cell = 1.9973;
  substanceOnly species CC_PGC in Cell = 1.9973;
  substanceOnly species CC_PKC in Cell = 1.9973;
  substanceOnly species DD_PCD in Cell = 0.0016;
  substanceOnly species DD_PED in Cell = 0.0016;
  substanceOnly species FF_PBF in Cell = 0;
  substanceOnly species FF_PDF in Cell = 0;
  substanceOnly species GG_PHG in Cell = 0.0013;
  substanceOnly species KK_PJK in Cell = 0.0013;
  substanceOnly species EQ_PFEQ in Cell = 0;
  substanceOnly species time_ in Cell = 0;

  // Parameters:
  slope = 0;
  kPGCC = 1;
  kPHGG = 1;
  kUPAA = 50;
  kGG = 2;
  kRAPAA = 500;
  kRDDPED = 0.01;
  kDegD = 1;
  kDMJ = 5;
  kDMK = 5;
  kDMH = 5;
  kDMF = 5;
  kDMG = 5;
  kDMD = 5;
  kDME = 5;
  kDMC = 5;
  kPKCC = 1;
  kDMB = 10;
  kDMA = 10;
  kUPFEQ = 75;
  kRPED = 100;
  kRAPBA = 50;
  kUEQ = 1;
  kPAA = 1;
  kRFFPDF = 50;
  kRPFEQ = 0.01;
  kPBFF = 1;
  kRGGPHG = 0.01;
  kPBA = 1;
  kPDFF = 1;
  kRPDF = 0.01;
  kUPJKK = 75;
  kRPDC = 50;
  kRPKC = 50;
  kUPEDD = 75;
  kRPCA = 0.01;
  kAB = 2;
  kPCA = 1;
  kUPGCC = 75;
  kRPCD = 50;
  kPCDD = 1;
  kRCCPGC = 0.01;
  kCC = 2;
  kRPAA = 50;
  kRPJK = 0.01;
  kRFFPBF = 50;
  kUPCDD = 75;
  kKK = 2;
  kPJKK = 1;
  kDG = 1;
  kDH = 1;
  kRPBF = 0.005;
  kDE = 1;
  kDF = 1;
  kDC = 1;
  kRPBA = 0.01;
  kUK = 1;
  kDD = 2;
  kDA = 1;
  kDB = 0.12;
  kPEDD = 1;
  kREQPFEQ = 100;
  kPFEQ = 1;
  kUPKCC = 75;
  kDQ = 0.1;
  kUPDCC = 75;
  kUAB = 1;
  kDK = 1;
  kDJ = 1;
  kTK = 5;
  kTJ = 5;
  kRKKPJK = 50;
  kRAPCA = 50;
  kUPCA = 75;
  kRPHG = 50;
  kUD = 1;
  kUC = 1;
  kUG = 1;
  kEQ = 2;
  kUF = 1;
  kUPDFF = 75;
  kRCCPKC = 0.01;
  kFF = 2;
  kUPHGG = 75;
  kRCCPDC = 0.01;
  kRDDPCD = 0.01;
  kPDCC = 1;
  kUPBFF = 75;
  kUPBA = 100;
  kTB = 2;
  kTA = 20;
  kRPGC = 50;
  kTD = 5;
  kTC = 5;
  kTF = 5;
  kTE = 5;
  kTH = 5;
  kTG = 5;

  // Reactions:
  r1: A -> ; kDA*A;
  r2: B -> ; kDB*B;
  r3: C -> ; kDC*C;
  r4: D -> ; kDegD*D;
  r5: E -> ; kDE*E;
  r6: F -> ; kDF*F;
  r7: G -> ; kDG*G;
  r8: H -> ; kDH*H;
  r9: J -> ; kDJ*J;
  r10: K -> ; kDK*K;
  r11: MA -> ; kDMA*MA;
  r12: MB -> ; kDMB*MB;
  r13: MC -> ; kDMC*MC;
  r14: MD -> ; kDMD*MD;
  r15: ME -> ; kDME*ME;
  r16: MF -> ; kDMF*MF;
  r17: MG -> ; kDMG*MG;
  r18: MH -> ; kDMH*MH;
  r19: MJ -> ; kDMJ*MJ;
  r20: MK -> ; kDMK*MK;
  r21: -> A; kTA*MA;  // modifiers: MA
  r22: -> B; kTB*MB;  // modifiers: MB
  r23: -> C; kTC*MC;  // modifiers: MC
  r24: -> D; kTD*MD;  // modifiers: MD
  r25: -> E; kTE*ME;  // modifiers: ME
  r26: -> F; kTF*MF;  // modifiers: MF
  r27: -> G; kTG*MG;  // modifiers: MG
  r28: -> H; kTH*MH;  // modifiers: MH
  r29: -> J; kTJ*MJ;  // modifiers: MJ
  r30: -> K; kTK*MK;  // modifiers: MK
  r31: 2 C -> CC; kCC*C*C;
  r32: 2 D -> DD; kDD*D*D;
  r33: 2 F -> FF; kFF*F*F;
  r34: 2 G -> GG; kGG*G*G;
  r35: 2 K -> KK; kKK*K*K;
  r36: E + Q -> EQ; kEQ*E*Q;
  r37: A + B -> AB; kAB*A*B;
  r38: CC -> 2 C; kUC*CC;
  r39: DD -> 2 D; kUD*DD;
  r40: FF -> 2 F; kUF*FF;
  r41: GG -> 2 G; kUG*GG;
  r42: KK -> 2 K; kUK*KK;
  r43: EQ -> E + Q; kUEQ*EQ;
  r44: AB -> B; kUAB*AB;
  r45: A + PAA -> A_PAA; kPAA*A*PAA;
  r46: A + PBA -> A_PBA; kPBA*A*PBA;
  r47: A + PCA -> A_PCA; kPCA*A*PCA;
  r48: PDC + CC -> CC_PDC; kPDCC*CC*PDC;
  r49: PGC + CC -> CC_PGC; kPGCC*CC*PGC;
  r50: PKC + CC -> CC_PKC; kPKCC*CC*PKC;
  r51: PCD + DD -> DD_PCD; kPCDD*DD*PCD;
  r52: PED + DD -> DD_PED; kPEDD*DD*PED;
  r53: PBF + FF -> FF_PBF; kPBFF*FF*PBF;
  r54: PDF + FF -> FF_PDF; kPDFF*FF*PDF;
  r55: PHG + GG -> GG_PHG; kPHGG*GG*PHG;
  r56: PJK + KK -> KK_PJK; kPJKK*KK*PJK;
  r57: PFEQ + EQ -> EQ_PFEQ; kPFEQ*EQ*PFEQ;
  r58: A_PAA -> A + PAA; kUPAA*A_PAA;
  r59: A_PBA -> A + PBA; kUPBA*A_PBA;
  r60: A_PCA -> A + PCA; kUPCA*A_PCA;
  r61: CC_PDC -> PDC + CC; kUPDCC*CC_PDC;
  r62: CC_PGC -> PGC + CC; kUPGCC*CC_PGC;
  r63: CC_PKC -> PKC + CC; kUPKCC*CC_PKC;
  r64: DD_PCD -> PCD + DD; kUPCDD*DD_PCD;
  r65: DD_PED -> PED + DD; kUPEDD*DD_PED;
  r66: FF_PBF -> PBF + FF; kUPBFF*FF_PBF;
  r67: FF_PDF -> PDF + FF; kUPDFF*FF_PDF;
  r68: GG_PHG -> PHG + GG; kUPHGG*GG_PHG;
  r69: KK_PJK -> PJK + KK; kUPJKK*KK_PJK;
  r70: EQ_PFEQ -> PFEQ + EQ; kUPFEQ*EQ_PFEQ;
  r71: -> MA; kRPAA*PAA;  // modifiers: PAA
  r72: -> MA; kRAPAA*A_PAA;  // modifiers: A_PAA
  r73: -> MB; kRPBA*PBA;  // modifiers: PBA
  r74: -> MB; kRAPBA*A_PBA;  // modifiers: A_PBA
  r75: -> MB; kRPBF*PBF;  // modifiers: PBF
  r76: -> MB; kRFFPBF*FF_PBF;  // modifiers: FF_PBF
  r77: -> MC; kRPCA*PCA;  // modifiers: PCA
  r78: -> MC; kRAPCA*A_PCA;  // modifiers: A_PCA
  r79: -> MC; kRPCD*PCD;  // modifiers: PCD
  r80: -> MC; kRDDPCD*DD_PCD;  // modifiers: DD_PCD
  r81: -> MD; kRPDC*PDC;  // modifiers: PDC
  r82: -> MD; kRCCPDC*CC_PDC;  // modifiers: CC_PDC
  r83: -> MD; kRPDF*PDF;  // modifiers: PDF
  r84: -> MD; kRFFPDF*FF_PDF;  // modifiers: FF_PDF
  r85: -> ME; kRPED*PED;  // modifiers: PED
  r86: -> ME; kRDDPED*DD_PED;  // modifiers: DD_PED
  r87: -> MF; kRPFEQ*PFEQ;  // modifiers: PFEQ
  r88: -> MF; kREQPFEQ*EQ_PFEQ;  // modifiers: EQ_PFEQ
  r89: -> MG; kRPGC*PGC;  // modifiers: PGC
  r90: -> MG; kRCCPGC*CC_PGC;  // modifiers: CC_PGC
  r91: -> MH; kRPHG*PHG;  // modifiers: PHG
  r92: -> MH; kRGGPHG*GG_PHG;  // modifiers: GG_PHG
  r93: -> MJ; kRPJK*PJK;  // modifiers: PJK
  r94: -> MJ; kRKKPJK*KK_PJK;  // modifiers: KK_PJK
  r95: -> MK; kRPKC*PKC;  // modifiers: PKC
  r96: -> MK; kRCCPKC*CC_PKC;  // modifiers: CC_PKC
  r97: -> time_; 1;
  r98: -> Q; slope;
  r99: Q -> ; kDQ*Q;

  // Events:
  pertubation_begin: at (time_ <= 1000): slope = 100000;
  pertubation_stop: at (time_ <= 1010): slope = 0;
end
