// SBML level 1 version 2

model zak()

  // Compartments:
  compartment Cell = 1;

  // Species:
  species A in Cell = 904.8395/Cell;
  species B in Cell = 0.5641/Cell;
  species C in Cell = 166.9104/Cell;
  species D in Cell = 0.1756/Cell;
  species E in Cell = 199.8356/Cell;
  species F in Cell = 0.02/Cell;
  species G in Cell = 0.1545/Cell;
  species H in Cell = 99.9363/Cell;
  species J in Cell = 0.0837/Cell;
  species K in Cell = 0.1545/Cell;
  species MA in Cell = 95.2973/Cell;
  species MB in Cell = 9.0081/Cell;
  species MC in Cell = 38.4593/Cell;
  species MD in Cell = 0.0351/Cell;
  species ME in Cell = 39.9671/Cell;
  species MF in Cell = 0.004/Cell;
  species MG in Cell = 0.0309/Cell;
  species MH in Cell = 19.9873/Cell;
  species MJ in Cell = 0.0167/Cell;
  species MK in Cell = 0.0309/Cell;
  species PAA in Cell = 0.1047/Cell;
  species PBA in Cell = 0.199/Cell;
  species PBF in Cell = 2/Cell;
  species PCA in Cell = 0.1531/Cell;
  species PCD in Cell = 1.9984/Cell;
  species PDC in Cell = 0.0027/Cell;
  species PDF in Cell = 2/Cell;
  species PED in Cell = 1.9984/Cell;
  species PFEQ in Cell = 2/Cell;
  species PGC in Cell = 0.0027/Cell;
  species PHG in Cell = 1.9987/Cell;
  species PJK in Cell = 1.9987/Cell;
  species PKC in Cell = 0.0027/Cell;
  species CC in Cell = 55705/Cell;
  species DD in Cell = 0.0617/Cell;
  species FF in Cell = 8e-4/Cell;
  species GG in Cell = 0.0478/Cell;
  species KK in Cell = 0.0478/Cell;
  species EQ in Cell = 0;
  species AB in Cell = 1003/Cell;
  species Q in Cell = 0;
  species A_PAA in Cell = 1.8953/Cell;
  species A_PBA in Cell = 1.801/Cell;
  species A_PCA in Cell = 1.8469/Cell;
  species CC_PDC in Cell = 1.9973/Cell;
  species CC_PGC in Cell = 1.9973/Cell;
  species CC_PKC in Cell = 1.9973/Cell;
  species DD_PCD in Cell = 0.0016/Cell;
  species DD_PED in Cell = 0.0016/Cell;
  species FF_PBF in Cell = 0;
  species FF_PDF in Cell = 0;
  species GG_PHG in Cell = 0.0013/Cell;
  species KK_PJK in Cell = 0.0013/Cell;
  species EQ_PFEQ in Cell = 0;
  species time_ in Cell = 0;

  // Parameters:
  slope = 100000;
  kPGCC = 1;
  kPHGG = 1;
  kUPAA = 50;
  kGG = 2;
  kRAPAA = 500;
  kRDDPED = 0.01;
  kDegD = 1;
  kDMJ = 5;
  kDMK = 5;
  kDMH = 5;
  kDMF = 5;
  kDMG = 5;
  kDMD = 5;
  kDME = 5;
  kDMC = 5;
  kPKCC = 1;
  kDMB = 10;
  kDMA = 10;
  kUPFEQ = 75;
  kRPED = 100;
  kRAPBA = 50;
  kUEQ = 1;
  kPAA = 1;
  kRFFPDF = 50;
  kRPFEQ = 0.01;
  kPBFF = 1;
  kRGGPHG = 0.01;
  kPBA = 1;
  kPDFF = 1;
  kRPDF = 0.01;
  kUPJKK = 75;
  kRPDC = 50;
  kRPKC = 50;
  kUPEDD = 75;
  kRPCA = 0.01;
  kAB = 2;
  kPCA = 1;
  kUPGCC = 75;
  kRPCD = 50;
  kPCDD = 1;
  kRCCPGC = 0.01;
  kCC = 2;
  kRPAA = 50;
  kRPJK = 0.01;
  kRFFPBF = 50;
  kUPCDD = 75;
  kKK = 2;
  kPJKK = 1;
  kDG = 1;
  kDH = 1;
  kRPBF = 0.005;
  kDE = 1;
  kDF = 1;
  kDC = 1;
  kRPBA = 0.01;
  kUK = 1;
  kDD = 2;
  kDA = 1;
  kDB = 0.12;
  kPEDD = 1;
  kREQPFEQ = 100;
  kPFEQ = 1;
  kUPKCC = 75;
  kDQ = 0.1;
  kUPDCC = 75;
  kUAB = 1;
  kDK = 1;
  kDJ = 1;
  kTK = 5;
  kTJ = 5;
  kRKKPJK = 50;
  kRAPCA = 50;
  kUPCA = 75;
  kRPHG = 50;
  kUD = 1;
  kUC = 1;
  kUG = 1;
  kEQ = 2;
  kUF = 1;
  kUPDFF = 75;
  kRCCPKC = 0.01;
  kFF = 2;
  kUPHGG = 75;
  kRCCPDC = 0.01;
  kRDDPCD = 0.01;
  kPDCC = 1;
  kUPBFF = 75;
  kUPBA = 100;
  kTB = 2;
  kTA = 20;
  kRPGC = 50;
  kTD = 5;
  kTC = 5;
  kTF = 5;
  kTE = 5;
  kTH = 5;
  kTG = 5;

  // Reactions:
  r1: A -> ; kDA*A;
  r2: B -> ; kDB*B;
  r3: C -> ; kDC*C;
  r4: D -> ; kDegD*D;
  r5: E -> ; kDE*E;
  r6: F -> ; kDF*F;
  r7: G -> ; kDG*G;
  r8: H -> ; kDH*H;
  r9: J -> ; kDJ*J;
  r10: K -> ; kDK*K;
  r11: MA -> ; kDMA*MA;
  r12: MB -> ; kDMB*MB;
  r13: MC -> ; kDMC*MC;
  r14: MD -> ; kDMD*MD;
  r15: ME -> ; kDME*ME;
  r16: MF -> ; kDMF*MF;
  r17: MG -> ; kDMG*MG;
  r18: MH -> ; kDMH*MH;
  r19: MJ -> ; kDMJ*MJ;
  r20: MK -> ; kDMK*MK;
  r21: -> A; kTA*MA;
  r22: -> B; kTB*MB;
  r23: -> C; kTC*MC;
  r24: -> D; kTD*MD;
  r25: -> E; kTE*ME;
  r26: -> F; kTF*MF;
  r27: -> G; kTG*MG;
  r28: -> H; kTH*MH;
  r29: -> J; kTJ*MJ;
  r30: -> K; kTK*MK;
  r31: 2 C -> CC; kCC*C*C;
  r32: 2 D -> DD; kDD*D*D;
  r33: 2 F -> FF; kFF*F*F;
  r34: 2 G -> GG; kGG*G*G;
  r35: 2 K -> KK; kKK*K*K;
  r36: E + Q -> EQ; kEQ*E*Q;
  r37: A + B -> AB; kAB*A*B;
  r38: CC -> 2 C; kUC*CC;
  r39: DD -> 2 D; kUD*DD;
  r40: FF -> 2 F; kUF*FF;
  r41: GG -> 2 G; kUG*GG;
  r42: KK -> 2 K; kUK*KK;
  r43: EQ -> E + Q; kUEQ*EQ;
  r44: AB -> B; kUAB*AB;
  r45: A + PAA -> A_PAA; kPAA*A*PAA;
  r46: A + PBA -> A_PBA; kPBA*A*PBA;
  r47: A + PCA -> A_PCA; kPCA*A*PCA;
  r48: PDC + CC -> CC_PDC; kPDCC*CC*PDC;
  r49: PGC + CC -> CC_PGC; kPGCC*CC*PGC;
  r50: PKC + CC -> CC_PKC; kPKCC*CC*PKC;
  r51: PCD + DD -> DD_PCD; kPCDD*DD*PCD;
  r52: PED + DD -> DD_PED; kPEDD*DD*PED;
  r53: PBF + FF -> FF_PBF; kPBFF*FF*PBF;
  r54: PDF + FF -> FF_PDF; kPDFF*FF*PDF;
  r55: PHG + GG -> GG_PHG; kPHGG*GG*PHG;
  r56: PJK + KK -> KK_PJK; kPJKK*KK*PJK;
  r57: PFEQ + EQ -> EQ_PFEQ; kPFEQ*EQ*PFEQ;
  r58: A_PAA -> A + PAA; kUPAA*A_PAA;
  r59: A_PBA -> A + PBA; kUPBA*A_PBA;
  r60: A_PCA -> A + PCA; kUPCA*A_PCA;
  r61: CC_PDC -> PDC + CC; kUPDCC*CC_PDC;
  r62: CC_PGC -> PGC + CC; kUPGCC*CC_PGC;
  r63: CC_PKC -> PKC + CC; kUPKCC*CC_PKC;
  r64: DD_PCD -> PCD + DD; kUPCDD*DD_PCD;
  r65: DD_PED -> PED + DD; kUPEDD*DD_PED;
  r66: FF_PBF -> PBF + FF; kUPBFF*FF_PBF;
  r67: FF_PDF -> PDF + FF; kUPDFF*FF_PDF;
  r68: GG_PHG -> PHG + GG; kUPHGG*GG_PHG;
  r69: KK_PJK -> PJK + KK; kUPJKK*KK_PJK;
  r70: EQ_PFEQ -> PFEQ + EQ; kUPFEQ*EQ_PFEQ;
  r71: -> MA; kRPAA*PAA;
  r72: -> MA; kRAPAA*A_PAA;
  r73: -> MB; kRPBA*PBA;
  r74: -> MB; kRAPBA*A_PBA;
  r75: -> MB; kRPBF*PBF;
  r76: -> MB; kRFFPBF*FF_PBF;
  r77: -> MC; kRPCA*PCA;
  r78: -> MC; kRAPCA*A_PCA;
  r79: -> MC; kRPCD*PCD;
  r80: -> MC; kRDDPCD*DD_PCD;
  r81: -> MD; kRPDC*PDC;
  r82: -> MD; kRCCPDC*CC_PDC;
  r83: -> MD; kRPDF*PDF;
  r84: -> MD; kRFFPDF*FF_PDF;
  r85: -> ME; kRPED*PED;
  r86: -> ME; kRDDPED*DD_PED;
  r87: -> MF; kRPFEQ*PFEQ;
  r88: -> MF; kREQPFEQ*EQ_PFEQ;
  r89: -> MG; kRPGC*PGC;
  r90: -> MG; kRCCPGC*CC_PGC;
  r91: -> MH; kRPHG*PHG;
  r92: -> MH; kRGGPHG*GG_PHG;
  r93: -> MJ; kRPJK*PJK;
  r94: -> MJ; kRKKPJK*KK_PJK;
  r95: -> MK; kRPKC*PKC;
  r96: -> MK; kRCCPKC*CC_PKC;
  r97: -> time_; 1;
  r98: -> Q; slope;
  r99: Q -> ; kDQ*Q;
end
